units lj
atom_style atomic
lattice fcc 0.8442
region box block 0 120 0 120 0 120
create_box 1 box
create_atoms 1 box
mass 1 1.0
velocity all create 1.44 87287 loop geom
pair_style lj/cut/gpu 2.5
pair_coeff 1 1 1.0 1.0 2.5
fix 1 all nve
run 10000
